<neuroml xmlns="http://www.neuroml.org/schema/neuroml2"  xmlns:xs="http://www.w3.org/2001/XMLSchema" xmlns:xsi="http://www.w3.org/2001/XMLSchema-instance" xsi:schemaLocation="http://www.neuroml.org/schema/neuroml2 https://raw.github.com/NeuroML/NeuroML2/development/Schemas/NeuroML2/NeuroML_v2beta4.xsd" id="CortexDemo">
    <include href="SimpleIaF.cell.nml"></include>
    <include href="SimpleIaF.cell.nml"></include>
    <include href="AMPAR.synapse.nml"></include>
    <include href="GABAA.synapse.nml"></include>
    <include href="AMPAR.synapse.nml"></include>
    <poissonFiringSynapse id="input_80Hz" synapse="AMPAR" averageRate="80 per_s" spikeTarget="./AMPAR"/>
    <network id="CortexDemo" type="networkWithTemperature" temperature="32.0 degC">
        <notes>Network generated using libNeuroML v0.2.6</notes>
        <population id="Exc" component="SimpleIaF" type="populationList" size="40">
            <instance id="0">
                <location y="88.146519835099994" x="193.290707137999988" z="1.49829401172"/>
            </instance>
            <instance id="1">
                <location y="187.853799473000009" x="182.195192490000011" z="116.445514611999997"/>
            </instance>
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        </population>
        <population id="Inh" component="SimpleIaF" type="populationList" size="20">
            <instance id="0">
                <location y="116.902362112999995" x="34.937983680599999" z="60.355411559799997"/>
            </instance>
            <instance id="1">
                <location y="106.868149568000007" x="162.570278871999989" z="99.917460838599993"/>
            </instance>
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        </population>
        <projection id="NetConn_Exc_Inh" postsynapticPopulation="Inh" presynapticPopulation="Exc" synapse="AMPAR">
            <connection id="0" preFractionAlong="0.5" preCellId="../Exc/0/SimpleIaF" postFractionAlong="0.5" postSegmentId="0" postCellId="../Inh/1/SimpleIaF" preSegmentId="0"/>
            <connection id="5" preFractionAlong="0.5" preCellId="../Exc/0/SimpleIaF" postFractionAlong="0.5" postSegmentId="0" postCellId="../Inh/6/SimpleIaF" preSegmentId="0"/>
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        </projection>
        <projection id="NetConn_Inh_Exc" postsynapticPopulation="Exc" presynapticPopulation="Inh" synapse="GABAA">
            <connection id="4" preFractionAlong="0.5" preCellId="../Inh/5/SimpleIaF" postFractionAlong="0.5" postSegmentId="0" postCellId="../Exc/0/SimpleIaF" preSegmentId="0"/>
            <connection id="6" preFractionAlong="0.5" preCellId="../Inh/7/SimpleIaF" postFractionAlong="0.5" postSegmentId="0" postCellId="../Exc/0/SimpleIaF" preSegmentId="0"/>
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        </projection>
        <inputList id="Input_0" component="input_80Hz" population="Exc">
            <input destination="synapses" id="0" target="../Exc/0/SimpleIaF"/>
            <input destination="synapses" id="0" target="../Exc/0/SimpleIaF"/>
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        </inputList>
    </network>
</neuroml>
