<neuroml xmlns="http://www.neuroml.org/schema/neuroml2"  xmlns:xs="http://www.w3.org/2001/XMLSchema" xmlns:xsi="http://www.w3.org/2001/XMLSchema-instance" xsi:schemaLocation="http://www.neuroml.org/schema/neuroml2 https://raw.github.com/NeuroML/NeuroML2/development/Schemas/NeuroML2/NeuroML_v2beta4.xsd" id="CortexDemoHH">
    <include href="HHCell.cell.nml"></include>
    <include href="AMPAR.synapse.nml"></include>
    <include href="GABAA.synapse.nml"></include>
    <poissonFiringSynapse id="input_70Hz" synapse="AMPAR" averageRate="70 per_s" spikeTarget="./AMPAR"/>
    <network id="CortexDemoHH" type="networkWithTemperature" temperature="32.0 degC">
        <notes>Network generated using libNeuroML v0.2.6</notes>
        <population id="Exc" component="HHCell" type="populationList" size="40">
            <instance id="0">
                <location y="22.036629958799999" x="96.645353569199997" z="0.749147005859"/>
            </instance>
            <instance id="1">
                <location y="46.963449868200001" x="91.097596244900004" z="58.222757305899997"/>
            </instance>
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        </population>
        <population id="Inh" component="HHCell" type="populationList" size="20">
            <instance id="0">
                <location y="29.2255905283" x="17.468991840299999" z="30.177705779899998"/>
            </instance>
            <instance id="1">
                <location y="26.7170373921" x="81.285139435900007" z="49.958730419299997"/>
            </instance>
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        </population>
        <projection id="NetConn_Exc_Exc" postsynapticPopulation="Exc" presynapticPopulation="Exc" synapse="AMPAR">
            <connection id="0" preFractionAlong="0.5" preCellId="../Exc/0/HHCell" postFractionAlong="0.5" postSegmentId="0" postCellId="../Exc/5/HHCell" preSegmentId="0"/>
            <connection id="1" preFractionAlong="0.5" preCellId="../Exc/0/HHCell" postFractionAlong="0.5" postSegmentId="0" postCellId="../Exc/6/HHCell" preSegmentId="0"/>
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        </projection>
        <projection id="NetConn_Exc_Inh" postsynapticPopulation="Inh" presynapticPopulation="Exc" synapse="AMPAR">
            <connection id="0" preFractionAlong="0.5" preCellId="../Exc/0/HHCell" postFractionAlong="0.5" postSegmentId="0" postCellId="../Inh/1/HHCell" preSegmentId="0"/>
            <connection id="1" preFractionAlong="0.5" preCellId="../Exc/0/HHCell" postFractionAlong="0.5" postSegmentId="0" postCellId="../Inh/6/HHCell" preSegmentId="0"/>
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        </projection>
        <projection id="NetConn_Inh_Exc" postsynapticPopulation="Exc" presynapticPopulation="Inh" synapse="GABAA">
            <connection id="0" preFractionAlong="0.5" preCellId="../Inh/2/HHCell" postFractionAlong="0.5" postSegmentId="0" postCellId="../Exc/0/HHCell" preSegmentId="0"/>
            <connection id="1" preFractionAlong="0.5" preCellId="../Inh/5/HHCell" postFractionAlong="0.5" postSegmentId="0" postCellId="../Exc/0/HHCell" preSegmentId="0"/>
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        </projection>
        <projection id="NetConn_Inh_Inh" postsynapticPopulation="Inh" presynapticPopulation="Inh" synapse="GABAA">
            <connection id="0" preFractionAlong="0.5" preCellId="../Inh/1/HHCell" postFractionAlong="0.5" postSegmentId="0" postCellId="../Inh/0/HHCell" preSegmentId="0"/>
            <connection id="1" preFractionAlong="0.5" preCellId="../Inh/2/HHCell" postFractionAlong="0.5" postSegmentId="0" postCellId="../Inh/0/HHCell" preSegmentId="0"/>
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        </projection>
        <inputList id="Input_0" component="input_70Hz" population="Exc">
            <input destination="synapses" id="0" target="../Exc/0/HHCell"/>
            <input destination="synapses" id="0" target="../Exc/0/HHCell"/>
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        </inputList>
    </network>
</neuroml>
