<?xml version="1.0" encoding="UTF-8"?>
<neuroml xmlns="http://www.neuroml.org/schema/neuroml2" xmlns:xsi="http://www.w3.org/2001/XMLSchema-instance" xsi:schemaLocation="http://www.neuroml.org/schema/neuroml2 https://raw.github.com/NeuroML/NeuroML2/development/Schemas/NeuroML2/NeuroML_v2beta4.xsd" id="WhichModel">
<include href="GABAB.synapse.nml"/>
<include href="GABAA.synapse.nml"/>
<include href="AMPA_syn.synapse.nml"/>
<include href="HHCell.cell.nml"></include>
<network id="net1" type="networkWithTemperature" temperature="32.0 degC">
<population id="SOM_L23" component="HHCell" type="populationList" size="16">
<instance id="0"><location x="101.392390838" y="213.340697572" z="262.473962319"/></instance>
<instance id="1"><location x="259.695951863" y="272.482270253" z="100.822482734"/></instance>
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</population>
<population id="IT_L23" component="HHCell" type="populationList" size="125">
<instance id="0"><location x="168.792791056" y="184.000107343" z="47.5184385029"/></instance>
<instance id="1"><location x="238.56069594" y="165.221700594" z="8.02997761246"/></instance>
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</population>
<population id="SOM_L5" component="HHCell" type="populationList" size="38">
<instance id="0"><location x="95.8571965647" y="965.351372661" z="245.804329941"/></instance>
<instance id="1"><location x="21.9617824851" y="670.377500714" z="148.375332984"/></instance>
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</population>
<population id="PV_L23" component="HHCell" type="populationList" size="17">
<instance id="0"><location x="297.625996581" y="381.53165826" z="259.949926208"/></instance>
<instance id="1"><location x="9.54347613332" y="278.407087381" z="218.07353188"/></instance>
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</population>
<population id="CT_L6" component="HHCell" type="populationList" size="76">
<instance id="0"><location x="244.81481314" y="1119.34370166" z="205.739074781"/></instance>
<instance id="1"><location x="37.8199257248" y="1195.07350185" z="116.639908616"/></instance>
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</population>
<population id="PV_L5" component="HHCell" type="populationList" size="39">
<instance id="0"><location x="184.08989571" y="957.736338081" z="34.8265608739"/></instance>
<instance id="1"><location x="40.4114213828" y="772.246756896" z="54.639067663"/></instance>
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</population>
<population id="PV_L6" component="HHCell" type="populationList" size="18">
<instance id="0"><location x="174.861133446" y="1327.57684969" z="60.9347902525"/></instance>
<instance id="1"><location x="130.892969565" y="1048.59957503" z="265.050783139"/></instance>
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</population>
<population id="IT_L5B" component="HHCell" type="populationList" size="81">
<instance id="0"><location x="255.685664345" y="956.865481125" z="107.227352715"/></instance>
<instance id="1"><location x="109.525852282" y="756.508965264" z="32.378467106"/></instance>
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</population>
<population id="IT_L5A" component="HHCell" type="populationList" size="72">
<instance id="0"><location x="141.062982112" y="594.53560349" z="91.582837468"/></instance>
<instance id="1"><location x="251.215297281" y="624.544747898" z="11.3111677045"/></instance>
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</population>
<population id="PT_L5B" component="HHCell" type="populationList" size="81">
<instance id="0"><location x="144.042094954" y="835.436875041" z="240.880542911"/></instance>
<instance id="1"><location x="254.853955097" y="705.364950633" z="253.258806145"/></instance>
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</population>
<population id="IT_L6" component="HHCell" type="populationList" size="72">
<instance id="0"><location x="144.057821939" y="1129.10801744" z="85.5062512879"/></instance>
<instance id="1"><location x="73.567972194" y="1308.54817362" z="1.07312434917"/></instance>
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</population>
<population id="SOM_L6" component="HHCell" type="populationList" size="17">
<instance id="0"><location x="228.932399058" y="1309.51086381" z="172.680065238"/></instance>
<instance id="1"><location x="65.7945570284" y="1196.56490523" z="90.8643877203"/></instance>
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</population>
<population id="IT_L4" component="HHCell" type="populationList" size="64">
<instance id="0"><location x="289.009868908" y="535.896027743" z="25.7225140049"/></instance>
<instance id="1"><location x="71.7297634659" y="510.366625622" z="190.948141475"/></instance>
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</population>
<projection id="IT_L23_IT_L5A" presynapticPopulation="IT_L23" postsynapticPopulation="IT_L5A" synapse="AMPA_syn">
<connection id="0" preCellId="../IT_L23/1/HHCell" postCellId="../IT_L5A/15/HHCell" preSegmentId="0" preFractionAlong="0.5" postSegmentId="0" postFractionAlong="0.5"/>
<connection id="1" preCellId="../IT_L23/1/HHCell" postCellId="../IT_L5A/18/HHCell" preSegmentId="0" preFractionAlong="0.5" postSegmentId="0" postFractionAlong="0.5"/>
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</projection>
<projection id="SOM_L5_IT_L5B" presynapticPopulation="SOM_L5" postsynapticPopulation="IT_L5B" synapse="AMPA_syn">
<connection id="0" preCellId="../SOM_L5/0/HHCell" postCellId="../IT_L5B/10/HHCell" preSegmentId="0" preFractionAlong="0.5" postSegmentId="0" postFractionAlong="0.5"/>
<connection id="1" preCellId="../SOM_L5/1/HHCell" postCellId="../IT_L5B/57/HHCell" preSegmentId="0" preFractionAlong="0.5" postSegmentId="0" postFractionAlong="0.5"/>
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</projection>
<projection id="IT_L5A_IT_L4" presynapticPopulation="IT_L5A" postsynapticPopulation="IT_L4" synapse="AMPA_syn">
<connection id="0" preCellId="../IT_L5A/3/HHCell" postCellId="../IT_L4/25/HHCell" preSegmentId="0" preFractionAlong="0.5" postSegmentId="0" postFractionAlong="0.5"/>
<connection id="1" preCellId="../IT_L5A/3/HHCell" postCellId="../IT_L4/8/HHCell" preSegmentId="0" preFractionAlong="0.5" postSegmentId="0" postFractionAlong="0.5"/>
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</projection>
<projection id="PV_L6_PT_L5B" presynapticPopulation="PV_L6" postsynapticPopulation="PT_L5B" synapse="AMPA_syn">
<connection id="0" preCellId="../PV_L6/0/HHCell" postCellId="../PT_L5B/66/HHCell" preSegmentId="0" preFractionAlong="0.5" postSegmentId="0" postFractionAlong="0.5"/>
<connection id="1" preCellId="../PV_L6/1/HHCell" postCellId="../PT_L5B/70/HHCell" preSegmentId="0" preFractionAlong="0.5" postSegmentId="0" postFractionAlong="0.5"/>
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</projection>
<projection id="IT_L5A_IT_L5B" presynapticPopulation="IT_L5A" postsynapticPopulation="IT_L5B" synapse="AMPA_syn">
<connection id="0" preCellId="../IT_L5A/1/HHCell" postCellId="../IT_L5B/38/HHCell" preSegmentId="0" preFractionAlong="0.5" postSegmentId="0" postFractionAlong="0.5"/>
<connection id="1" preCellId="../IT_L5A/1/HHCell" postCellId="../IT_L5B/39/HHCell" preSegmentId="0" preFractionAlong="0.5" postSegmentId="0" postFractionAlong="0.5"/>
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</projection>
<projection id="IT_L6_CT_L6" presynapticPopulation="IT_L6" postsynapticPopulation="CT_L6" synapse="AMPA_syn">
<connection id="0" preCellId="../IT_L6/2/HHCell" postCellId="../CT_L6/31/HHCell" preSegmentId="0" preFractionAlong="0.5" postSegmentId="0" postFractionAlong="0.5"/>
<connection id="1" preCellId="../IT_L6/3/HHCell" postCellId="../CT_L6/62/HHCell" preSegmentId="0" preFractionAlong="0.5" postSegmentId="0" postFractionAlong="0.5"/>
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</projection>
<projection id="IT_L4_IT_L5A" presynapticPopulation="IT_L4" postsynapticPopulation="IT_L5A" synapse="AMPA_syn">
<connection id="0" preCellId="../IT_L4/0/HHCell" postCellId="../IT_L5A/71/HHCell" preSegmentId="0" preFractionAlong="0.5" postSegmentId="0" postFractionAlong="0.5"/>
<connection id="1" preCellId="../IT_L4/0/HHCell" postCellId="../IT_L5A/18/HHCell" preSegmentId="0" preFractionAlong="0.5" postSegmentId="0" postFractionAlong="0.5"/>
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</projection>
<projection id="SOM_L5_PT_L5B" presynapticPopulation="SOM_L5" postsynapticPopulation="PT_L5B" synapse="AMPA_syn">
<connection id="0" preCellId="../SOM_L5/1/HHCell" postCellId="../PT_L5B/28/HHCell" preSegmentId="0" preFractionAlong="0.5" postSegmentId="0" postFractionAlong="0.5"/>
<connection id="1" preCellId="../SOM_L5/3/HHCell" postCellId="../PT_L5B/9/HHCell" preSegmentId="0" preFractionAlong="0.5" postSegmentId="0" postFractionAlong="0.5"/>
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</projection>
<projection id="PT_L5B_IT_L6" presynapticPopulation="PT_L5B" postsynapticPopulation="IT_L6" synapse="AMPA_syn">
<connection id="0" preCellId="../PT_L5B/4/HHCell" postCellId="../IT_L6/34/HHCell" preSegmentId="0" preFractionAlong="0.5" postSegmentId="0" postFractionAlong="0.5"/>
<connection id="1" preCellId="../PT_L5B/4/HHCell" postCellId="../IT_L6/46/HHCell" preSegmentId="0" preFractionAlong="0.5" postSegmentId="0" postFractionAlong="0.5"/>
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</projection>
<projection id="SOM_L23_PV_L23" presynapticPopulation="SOM_L23" postsynapticPopulation="PV_L23" synapse="GABAA">
<connection id="0" preCellId="../SOM_L23/1/HHCell" postCellId="../PV_L23/7/HHCell" preSegmentId="0" preFractionAlong="0.5" postSegmentId="0" postFractionAlong="0.5"/>
<connection id="1" preCellId="../SOM_L23/1/HHCell" postCellId="../PV_L23/1/HHCell" preSegmentId="0" preFractionAlong="0.5" postSegmentId="0" postFractionAlong="0.5"/>
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</projection>
<projection id="PV_L23_IT_L23" presynapticPopulation="PV_L23" postsynapticPopulation="IT_L23" synapse="AMPA_syn">
<connection id="0" preCellId="../PV_L23/0/HHCell" postCellId="../IT_L23/16/HHCell" preSegmentId="0" preFractionAlong="0.5" postSegmentId="0" postFractionAlong="0.5"/>
<connection id="1" preCellId="../PV_L23/0/HHCell" postCellId="../IT_L23/106/HHCell" preSegmentId="0" preFractionAlong="0.5" postSegmentId="0" postFractionAlong="0.5"/>
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</projection>
<projection id="IT_L23_SOM_L23" presynapticPopulation="IT_L23" postsynapticPopulation="SOM_L23" synapse="GABAB">
<connection id="0" preCellId="../IT_L23/1/HHCell" postCellId="../SOM_L23/9/HHCell" preSegmentId="0" preFractionAlong="0.5" postSegmentId="0" postFractionAlong="0.5"/>
<connection id="1" preCellId="../IT_L23/3/HHCell" postCellId="../SOM_L23/5/HHCell" preSegmentId="0" preFractionAlong="0.5" postSegmentId="0" postFractionAlong="0.5"/>
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</projection>
<projection id="CT_L6_IT_L6" presynapticPopulation="CT_L6" postsynapticPopulation="IT_L6" synapse="AMPA_syn">
<connection id="0" preCellId="../CT_L6/1/HHCell" postCellId="../IT_L6/54/HHCell" preSegmentId="0" preFractionAlong="0.5" postSegmentId="0" postFractionAlong="0.5"/>
<connection id="1" preCellId="../CT_L6/3/HHCell" postCellId="../IT_L6/39/HHCell" preSegmentId="0" preFractionAlong="0.5" postSegmentId="0" postFractionAlong="0.5"/>
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</projection>
<projection id="PV_L5_IT_L6" presynapticPopulation="PV_L5" postsynapticPopulation="IT_L6" synapse="AMPA_syn">
<connection id="0" preCellId="../PV_L5/0/HHCell" postCellId="../IT_L6/46/HHCell" preSegmentId="0" preFractionAlong="0.5" postSegmentId="0" postFractionAlong="0.5"/>
<connection id="1" preCellId="../PV_L5/1/HHCell" postCellId="../IT_L6/39/HHCell" preSegmentId="0" preFractionAlong="0.5" postSegmentId="0" postFractionAlong="0.5"/>
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</projection>
<projection id="IT_L5B_CT_L6" presynapticPopulation="IT_L5B" postsynapticPopulation="CT_L6" synapse="AMPA_syn">
<connection id="0" preCellId="../IT_L5B/0/HHCell" postCellId="../CT_L6/21/HHCell" preSegmentId="0" preFractionAlong="0.5" postSegmentId="0" postFractionAlong="0.5"/>
<connection id="1" preCellId="../IT_L5B/2/HHCell" postCellId="../CT_L6/39/HHCell" preSegmentId="0" preFractionAlong="0.5" postSegmentId="0" postFractionAlong="0.5"/>
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</projection>
<projection id="PV_L6_CT_L6" presynapticPopulation="PV_L6" postsynapticPopulation="CT_L6" synapse="AMPA_syn">
<connection id="0" preCellId="../PV_L6/0/HHCell" postCellId="../CT_L6/34/HHCell" preSegmentId="0" preFractionAlong="0.5" postSegmentId="0" postFractionAlong="0.5"/>
<connection id="1" preCellId="../PV_L6/1/HHCell" postCellId="../CT_L6/29/HHCell" preSegmentId="0" preFractionAlong="0.5" postSegmentId="0" postFractionAlong="0.5"/>
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</projection>
<projection id="IT_L5A_IT_L5A" presynapticPopulation="IT_L5A" postsynapticPopulation="IT_L5A" synapse="AMPA_syn">
<connection id="0" preCellId="../IT_L5A/0/HHCell" postCellId="../IT_L5A/1/HHCell" preSegmentId="0" preFractionAlong="0.5" postSegmentId="0" postFractionAlong="0.5"/>
<connection id="1" preCellId="../IT_L5A/0/HHCell" postCellId="../IT_L5A/30/HHCell" preSegmentId="0" preFractionAlong="0.5" postSegmentId="0" postFractionAlong="0.5"/>
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</projection>
<projection id="PV_L23_SOM_L23" presynapticPopulation="PV_L23" postsynapticPopulation="SOM_L23" synapse="GABAB">
<connection id="0" preCellId="../PV_L23/0/HHCell" postCellId="../SOM_L23/7/HHCell" preSegmentId="0" preFractionAlong="0.5" postSegmentId="0" postFractionAlong="0.5"/>
<connection id="1" preCellId="../PV_L23/0/HHCell" postCellId="../SOM_L23/11/HHCell" preSegmentId="0" preFractionAlong="0.5" postSegmentId="0" postFractionAlong="0.5"/>
<connection id="2" preCellId="../PV_L23/4/HHCell" postCellId="../SOM_L23/13/HHCell" preSegmentId="0" preFractionAlong="0.5" postSegmentId="0" postFractionAlong="0.5"/>
<connection id="3" preCellId="../PV_L23/13/HHCell" postCellId="../SOM_L23/4/HHCell" preSegmentId="0" preFractionAlong="0.5" postSegmentId="0" postFractionAlong="0.5"/>
</projection>
<projection id="SOM_L5_IT_L5A" presynapticPopulation="SOM_L5" postsynapticPopulation="IT_L5A" synapse="AMPA_syn">
<connection id="0" preCellId="../SOM_L5/0/HHCell" postCellId="../IT_L5A/27/HHCell" preSegmentId="0" preFractionAlong="0.5" postSegmentId="0" postFractionAlong="0.5"/>
<connection id="1" preCellId="../SOM_L5/1/HHCell" postCellId="../IT_L5A/1/HHCell" preSegmentId="0" preFractionAlong="0.5" postSegmentId="0" postFractionAlong="0.5"/>
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</projection>
<projection id="IT_L6_PT_L5B" presynapticPopulation="IT_L6" postsynapticPopulation="PT_L5B" synapse="AMPA_syn">
<connection id="0" preCellId="../IT_L6/20/HHCell" postCellId="../PT_L5B/19/HHCell" preSegmentId="0" preFractionAlong="0.5" postSegmentId="0" postFractionAlong="0.5"/>
<connection id="1" preCellId="../IT_L6/20/HHCell" postCellId="../PT_L5B/39/HHCell" preSegmentId="0" preFractionAlong="0.5" postSegmentId="0" postFractionAlong="0.5"/>
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</projection>
<projection id="PV_L23_IT_L5A" presynapticPopulation="PV_L23" postsynapticPopulation="IT_L5A" synapse="AMPA_syn">
<connection id="0" preCellId="../PV_L23/1/HHCell" postCellId="../IT_L5A/25/HHCell" preSegmentId="0" preFractionAlong="0.5" postSegmentId="0" postFractionAlong="0.5"/>
<connection id="1" preCellId="../PV_L23/1/HHCell" postCellId="../IT_L5A/27/HHCell" preSegmentId="0" preFractionAlong="0.5" postSegmentId="0" postFractionAlong="0.5"/>
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</projection>
<projection id="IT_L6_IT_L6" presynapticPopulation="IT_L6" postsynapticPopulation="IT_L6" synapse="AMPA_syn">
<connection id="0" preCellId="../IT_L6/1/HHCell" postCellId="../IT_L6/3/HHCell" preSegmentId="0" preFractionAlong="0.5" postSegmentId="0" postFractionAlong="0.5"/>
<connection id="1" preCellId="../IT_L6/3/HHCell" postCellId="../IT_L6/58/HHCell" preSegmentId="0" preFractionAlong="0.5" postSegmentId="0" postFractionAlong="0.5"/>
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</projection>
<projection id="SOM_L23_IT_L23" presynapticPopulation="SOM_L23" postsynapticPopulation="IT_L23" synapse="AMPA_syn">
<connection id="0" preCellId="../SOM_L23/0/HHCell" postCellId="../IT_L23/32/HHCell" preSegmentId="0" preFractionAlong="0.5" postSegmentId="0" postFractionAlong="0.5"/>
<connection id="1" preCellId="../SOM_L23/0/HHCell" postCellId="../IT_L23/117/HHCell" preSegmentId="0" preFractionAlong="0.5" postSegmentId="0" postFractionAlong="0.5"/>
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</projection>
<projection id="IT_L5A_CT_L6" presynapticPopulation="IT_L5A" postsynapticPopulation="CT_L6" synapse="AMPA_syn">
<connection id="0" preCellId="../IT_L5A/3/HHCell" postCellId="../CT_L6/59/HHCell" preSegmentId="0" preFractionAlong="0.5" postSegmentId="0" postFractionAlong="0.5"/>
<connection id="1" preCellId="../IT_L5A/5/HHCell" postCellId="../CT_L6/29/HHCell" preSegmentId="0" preFractionAlong="0.5" postSegmentId="0" postFractionAlong="0.5"/>
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</projection>
<projection id="PV_L5_CT_L6" presynapticPopulation="PV_L5" postsynapticPopulation="CT_L6" synapse="AMPA_syn">
<connection id="0" preCellId="../PV_L5/1/HHCell" postCellId="../CT_L6/9/HHCell" preSegmentId="0" preFractionAlong="0.5" postSegmentId="0" postFractionAlong="0.5"/>
<connection id="1" preCellId="../PV_L5/2/HHCell" postCellId="../CT_L6/58/HHCell" preSegmentId="0" preFractionAlong="0.5" postSegmentId="0" postFractionAlong="0.5"/>
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</projection>
<projection id="IT_L6_IT_L5A" presynapticPopulation="IT_L6" postsynapticPopulation="IT_L5A" synapse="AMPA_syn">
<connection id="0" preCellId="../IT_L6/0/HHCell" postCellId="../IT_L5A/63/HHCell" preSegmentId="0" preFractionAlong="0.5" postSegmentId="0" postFractionAlong="0.5"/>
<connection id="1" preCellId="../IT_L6/0/HHCell" postCellId="../IT_L5A/42/HHCell" preSegmentId="0" preFractionAlong="0.5" postSegmentId="0" postFractionAlong="0.5"/>
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</projection>
<projection id="SOM_L23_PT_L5B" presynapticPopulation="SOM_L23" postsynapticPopulation="PT_L5B" synapse="AMPA_syn">
<connection id="0" preCellId="../SOM_L23/3/HHCell" postCellId="../PT_L5B/38/HHCell" preSegmentId="0" preFractionAlong="0.5" postSegmentId="0" postFractionAlong="0.5"/>
<connection id="1" preCellId="../SOM_L23/4/HHCell" postCellId="../PT_L5B/73/HHCell" preSegmentId="0" preFractionAlong="0.5" postSegmentId="0" postFractionAlong="0.5"/>
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</projection>
<projection id="IT_L6_IT_L4" presynapticPopulation="IT_L6" postsynapticPopulation="IT_L4" synapse="AMPA_syn">
<connection id="0" preCellId="../IT_L6/24/HHCell" postCellId="../IT_L4/43/HHCell" preSegmentId="0" preFractionAlong="0.5" postSegmentId="0" postFractionAlong="0.5"/>
<connection id="1" preCellId="../IT_L6/39/HHCell" postCellId="../IT_L4/9/HHCell" preSegmentId="0" preFractionAlong="0.5" postSegmentId="0" postFractionAlong="0.5"/>
<connection id="2" preCellId="../IT_L6/47/HHCell" postCellId="../IT_L4/60/HHCell" preSegmentId="0" preFractionAlong="0.5" postSegmentId="0" postFractionAlong="0.5"/>
<connection id="3" preCellId="../IT_L6/52/HHCell" postCellId="../IT_L4/3/HHCell" preSegmentId="0" preFractionAlong="0.5" postSegmentId="0" postFractionAlong="0.5"/>
</projection>
<projection id="IT_L5B_PT_L5B" presynapticPopulation="IT_L5B" postsynapticPopulation="PT_L5B" synapse="AMPA_syn">
<connection id="0" preCellId="../IT_L5B/0/HHCell" postCellId="../PT_L5B/77/HHCell" preSegmentId="0" preFractionAlong="0.5" postSegmentId="0" postFractionAlong="0.5"/>
<connection id="1" preCellId="../IT_L5B/3/HHCell" postCellId="../PT_L5B/49/HHCell" preSegmentId="0" preFractionAlong="0.5" postSegmentId="0" postFractionAlong="0.5"/>
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</projection>
<projection id="SOM_L6_IT_L5B" presynapticPopulation="SOM_L6" postsynapticPopulation="IT_L5B" synapse="AMPA_syn">
<connection id="0" preCellId="../SOM_L6/1/HHCell" postCellId="../IT_L5B/16/HHCell" preSegmentId="0" preFractionAlong="0.5" postSegmentId="0" postFractionAlong="0.5"/>
<connection id="1" preCellId="../SOM_L6/4/HHCell" postCellId="../IT_L5B/66/HHCell" preSegmentId="0" preFractionAlong="0.5" postSegmentId="0" postFractionAlong="0.5"/>
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</projection>
<projection id="IT_L4_IT_L6" presynapticPopulation="IT_L4" postsynapticPopulation="IT_L6" synapse="AMPA_syn">
<connection id="0" preCellId="../IT_L4/0/HHCell" postCellId="../IT_L6/8/HHCell" preSegmentId="0" preFractionAlong="0.5" postSegmentId="0" postFractionAlong="0.5"/>
<connection id="1" preCellId="../IT_L4/0/HHCell" postCellId="../IT_L6/24/HHCell" preSegmentId="0" preFractionAlong="0.5" postSegmentId="0" postFractionAlong="0.5"/>
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</projection>
<projection id="SOM_L23_SOM_L23" presynapticPopulation="SOM_L23" postsynapticPopulation="SOM_L23" synapse="GABAB">
<connection id="0" preCellId="../SOM_L23/0/HHCell" postCellId="../SOM_L23/3/HHCell" preSegmentId="0" preFractionAlong="0.5" postSegmentId="0" postFractionAlong="0.5"/>
<connection id="1" preCellId="../SOM_L23/0/HHCell" postCellId="../SOM_L23/6/HHCell" preSegmentId="0" preFractionAlong="0.5" postSegmentId="0" postFractionAlong="0.5"/>
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</projection>
<projection id="IT_L23_IT_L23" presynapticPopulation="IT_L23" postsynapticPopulation="IT_L23" synapse="AMPA_syn">
<connection id="0" preCellId="../IT_L23/1/HHCell" postCellId="../IT_L23/106/HHCell" preSegmentId="0" preFractionAlong="0.5" postSegmentId="0" postFractionAlong="0.5"/>
<connection id="1" preCellId="../IT_L23/2/HHCell" postCellId="../IT_L23/4/HHCell" preSegmentId="0" preFractionAlong="0.5" postSegmentId="0" postFractionAlong="0.5"/>
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</projection>
<projection id="SOM_L5_CT_L6" presynapticPopulation="SOM_L5" postsynapticPopulation="CT_L6" synapse="AMPA_syn">
<connection id="0" preCellId="../SOM_L5/1/HHCell" postCellId="../CT_L6/68/HHCell" preSegmentId="0" preFractionAlong="0.5" postSegmentId="0" postFractionAlong="0.5"/>
<connection id="1" preCellId="../SOM_L5/2/HHCell" postCellId="../CT_L6/58/HHCell" preSegmentId="0" preFractionAlong="0.5" postSegmentId="0" postFractionAlong="0.5"/>
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</projection>
<projection id="IT_L4_CT_L6" presynapticPopulation="IT_L4" postsynapticPopulation="CT_L6" synapse="AMPA_syn">
<connection id="0" preCellId="../IT_L4/1/HHCell" postCellId="../CT_L6/20/HHCell" preSegmentId="0" preFractionAlong="0.5" postSegmentId="0" postFractionAlong="0.5"/>
<connection id="1" preCellId="../IT_L4/2/HHCell" postCellId="../CT_L6/42/HHCell" preSegmentId="0" preFractionAlong="0.5" postSegmentId="0" postFractionAlong="0.5"/>
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</projection>
<projection id="IT_L5B_IT_L6" presynapticPopulation="IT_L5B" postsynapticPopulation="IT_L6" synapse="AMPA_syn">
<connection id="0" preCellId="../IT_L5B/3/HHCell" postCellId="../IT_L6/18/HHCell" preSegmentId="0" preFractionAlong="0.5" postSegmentId="0" postFractionAlong="0.5"/>
<connection id="1" preCellId="../IT_L5B/4/HHCell" postCellId="../IT_L6/47/HHCell" preSegmentId="0" preFractionAlong="0.5" postSegmentId="0" postFractionAlong="0.5"/>
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</projection>
<projection id="SOM_L23_IT_L5A" presynapticPopulation="SOM_L23" postsynapticPopulation="IT_L5A" synapse="AMPA_syn">
<connection id="0" preCellId="../SOM_L23/1/HHCell" postCellId="../IT_L5A/57/HHCell" preSegmentId="0" preFractionAlong="0.5" postSegmentId="0" postFractionAlong="0.5"/>
<connection id="1" preCellId="../SOM_L23/6/HHCell" postCellId="../IT_L5A/68/HHCell" preSegmentId="0" preFractionAlong="0.5" postSegmentId="0" postFractionAlong="0.5"/>
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</projection>
<projection id="SOM_L5_IT_L6" presynapticPopulation="SOM_L5" postsynapticPopulation="IT_L6" synapse="AMPA_syn">
<connection id="0" preCellId="../SOM_L5/1/HHCell" postCellId="../IT_L6/54/HHCell" preSegmentId="0" preFractionAlong="0.5" postSegmentId="0" postFractionAlong="0.5"/>
<connection id="1" preCellId="../SOM_L5/3/HHCell" postCellId="../IT_L6/24/HHCell" preSegmentId="0" preFractionAlong="0.5" postSegmentId="0" postFractionAlong="0.5"/>
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</projection>
<projection id="PT_L5B_CT_L6" presynapticPopulation="PT_L5B" postsynapticPopulation="CT_L6" synapse="AMPA_syn">
<connection id="0" preCellId="../PT_L5B/1/HHCell" postCellId="../CT_L6/26/HHCell" preSegmentId="0" preFractionAlong="0.5" postSegmentId="0" postFractionAlong="0.5"/>
<connection id="1" preCellId="../PT_L5B/2/HHCell" postCellId="../CT_L6/42/HHCell" preSegmentId="0" preFractionAlong="0.5" postSegmentId="0" postFractionAlong="0.5"/>
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</projection>
<projection id="PV_L6_IT_L5A" presynapticPopulation="PV_L6" postsynapticPopulation="IT_L5A" synapse="AMPA_syn">
<connection id="0" preCellId="../PV_L6/9/HHCell" postCellId="../IT_L5A/30/HHCell" preSegmentId="0" preFractionAlong="0.5" postSegmentId="0" postFractionAlong="0.5"/>
<connection id="1" preCellId="../PV_L6/14/HHCell" postCellId="../IT_L5A/51/HHCell" preSegmentId="0" preFractionAlong="0.5" postSegmentId="0" postFractionAlong="0.5"/>
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</projection>
<projection id="PT_L5B_IT_L5A" presynapticPopulation="PT_L5B" postsynapticPopulation="IT_L5A" synapse="AMPA_syn">
<connection id="0" preCellId="../PT_L5B/1/HHCell" postCellId="../IT_L5A/58/HHCell" preSegmentId="0" preFractionAlong="0.5" postSegmentId="0" postFractionAlong="0.5"/>
<connection id="1" preCellId="../PT_L5B/4/HHCell" postCellId="../IT_L5A/46/HHCell" preSegmentId="0" preFractionAlong="0.5" postSegmentId="0" postFractionAlong="0.5"/>
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</projection>
<projection id="IT_L5A_IT_L6" presynapticPopulation="IT_L5A" postsynapticPopulation="IT_L6" synapse="AMPA_syn">
<connection id="0" preCellId="../IT_L5A/1/HHCell" postCellId="../IT_L6/31/HHCell" preSegmentId="0" preFractionAlong="0.5" postSegmentId="0" postFractionAlong="0.5"/>
<connection id="1" preCellId="../IT_L5A/2/HHCell" postCellId="../IT_L6/57/HHCell" preSegmentId="0" preFractionAlong="0.5" postSegmentId="0" postFractionAlong="0.5"/>
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</projection>
<projection id="IT_L4_IT_L23" presynapticPopulation="IT_L4" postsynapticPopulation="IT_L23" synapse="AMPA_syn">
<connection id="0" preCellId="../IT_L4/0/HHCell" postCellId="../IT_L23/33/HHCell" preSegmentId="0" preFractionAlong="0.5" postSegmentId="0" postFractionAlong="0.5"/>
<connection id="1" preCellId="../IT_L4/0/HHCell" postCellId="../IT_L23/65/HHCell" preSegmentId="0" preFractionAlong="0.5" postSegmentId="0" postFractionAlong="0.5"/>
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</projection>
<projection id="SOM_L6_IT_L5A" presynapticPopulation="SOM_L6" postsynapticPopulation="IT_L5A" synapse="AMPA_syn">
<connection id="0" preCellId="../SOM_L6/2/HHCell" postCellId="../IT_L5A/56/HHCell" preSegmentId="0" preFractionAlong="0.5" postSegmentId="0" postFractionAlong="0.5"/>
<connection id="1" preCellId="../SOM_L6/8/HHCell" postCellId="../IT_L5A/25/HHCell" preSegmentId="0" preFractionAlong="0.5" postSegmentId="0" postFractionAlong="0.5"/>
<connection id="2" preCellId="../SOM_L6/16/HHCell" postCellId="../IT_L5A/35/HHCell" preSegmentId="0" preFractionAlong="0.5" postSegmentId="0" postFractionAlong="0.5"/>
</projection>
<projection id="PT_L5B_PT_L5B" presynapticPopulation="PT_L5B" postsynapticPopulation="PT_L5B" synapse="AMPA_syn">
<connection id="0" preCellId="../PT_L5B/1/HHCell" postCellId="../PT_L5B/78/HHCell" preSegmentId="0" preFractionAlong="0.5" postSegmentId="0" postFractionAlong="0.5"/>
<connection id="1" preCellId="../PT_L5B/2/HHCell" postCellId="../PT_L5B/28/HHCell" preSegmentId="0" preFractionAlong="0.5" postSegmentId="0" postFractionAlong="0.5"/>
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</projection>
<projection id="PT_L5B_IT_L5B" presynapticPopulation="PT_L5B" postsynapticPopulation="IT_L5B" synapse="AMPA_syn">
<connection id="0" preCellId="../PT_L5B/1/HHCell" postCellId="../IT_L5B/20/HHCell" preSegmentId="0" preFractionAlong="0.5" postSegmentId="0" postFractionAlong="0.5"/>
<connection id="1" preCellId="../PT_L5B/3/HHCell" postCellId="../IT_L5B/7/HHCell" preSegmentId="0" preFractionAlong="0.5" postSegmentId="0" postFractionAlong="0.5"/>
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</projection>
<projection id="PV_L6_IT_L4" presynapticPopulation="PV_L6" postsynapticPopulation="IT_L4" synapse="AMPA_syn">
<connection id="0" preCellId="../PV_L6/0/HHCell" postCellId="../IT_L4/28/HHCell" preSegmentId="0" preFractionAlong="0.5" postSegmentId="0" postFractionAlong="0.5"/>
<connection id="1" preCellId="../PV_L6/0/HHCell" postCellId="../IT_L4/63/HHCell" preSegmentId="0" preFractionAlong="0.5" postSegmentId="0" postFractionAlong="0.5"/>
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</projection>
<projection id="PV_L6_IT_L5B" presynapticPopulation="PV_L6" postsynapticPopulation="IT_L5B" synapse="AMPA_syn">
<connection id="0" preCellId="../PV_L6/2/HHCell" postCellId="../IT_L5B/10/HHCell" preSegmentId="0" preFractionAlong="0.5" postSegmentId="0" postFractionAlong="0.5"/>
<connection id="1" preCellId="../PV_L6/3/HHCell" postCellId="../IT_L5B/38/HHCell" preSegmentId="0" preFractionAlong="0.5" postSegmentId="0" postFractionAlong="0.5"/>
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</projection>
<projection id="CT_L6_IT_L5B" presynapticPopulation="CT_L6" postsynapticPopulation="IT_L5B" synapse="AMPA_syn">
<connection id="0" preCellId="../CT_L6/0/HHCell" postCellId="../IT_L5B/9/HHCell" preSegmentId="0" preFractionAlong="0.5" postSegmentId="0" postFractionAlong="0.5"/>
<connection id="1" preCellId="../CT_L6/0/HHCell" postCellId="../IT_L5B/73/HHCell" preSegmentId="0" preFractionAlong="0.5" postSegmentId="0" postFractionAlong="0.5"/>
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</projection>
<projection id="PV_L23_PV_L23" presynapticPopulation="PV_L23" postsynapticPopulation="PV_L23" synapse="GABAA">
<connection id="0" preCellId="../PV_L23/1/HHCell" postCellId="../PV_L23/2/HHCell" preSegmentId="0" preFractionAlong="0.5" postSegmentId="0" postFractionAlong="0.5"/>
<connection id="1" preCellId="../PV_L23/4/HHCell" postCellId="../PV_L23/2/HHCell" preSegmentId="0" preFractionAlong="0.5" postSegmentId="0" postFractionAlong="0.5"/>
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</projection>
<projection id="SOM_L6_IT_L4" presynapticPopulation="SOM_L6" postsynapticPopulation="IT_L4" synapse="AMPA_syn">
<connection id="0" preCellId="../SOM_L6/2/HHCell" postCellId="../IT_L4/48/HHCell" preSegmentId="0" preFractionAlong="0.5" postSegmentId="0" postFractionAlong="0.5"/>
<connection id="1" preCellId="../SOM_L6/2/HHCell" postCellId="../IT_L4/62/HHCell" preSegmentId="0" preFractionAlong="0.5" postSegmentId="0" postFractionAlong="0.5"/>
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</projection>
<projection id="IT_L5A_SOM_L5" presynapticPopulation="IT_L5A" postsynapticPopulation="SOM_L5" synapse="GABAB">
<connection id="0" preCellId="../IT_L5A/6/HHCell" postCellId="../SOM_L5/23/HHCell" preSegmentId="0" preFractionAlong="0.5" postSegmentId="0" postFractionAlong="0.5"/>
</projection>
<projection id="IT_L4_PT_L5B" presynapticPopulation="IT_L4" postsynapticPopulation="PT_L5B" synapse="AMPA_syn">
<connection id="0" preCellId="../IT_L4/0/HHCell" postCellId="../PT_L5B/17/HHCell" preSegmentId="0" preFractionAlong="0.5" postSegmentId="0" postFractionAlong="0.5"/>
<connection id="1" preCellId="../IT_L4/1/HHCell" postCellId="../PT_L5B/10/HHCell" preSegmentId="0" preFractionAlong="0.5" postSegmentId="0" postFractionAlong="0.5"/>
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</projection>
<projection id="PV_L23_IT_L4" presynapticPopulation="PV_L23" postsynapticPopulation="IT_L4" synapse="AMPA_syn">
<connection id="0" preCellId="../PV_L23/5/HHCell" postCellId="../IT_L4/35/HHCell" preSegmentId="0" preFractionAlong="0.5" postSegmentId="0" postFractionAlong="0.5"/>
<connection id="1" preCellId="../PV_L23/7/HHCell" postCellId="../IT_L4/33/HHCell" preSegmentId="0" preFractionAlong="0.5" postSegmentId="0" postFractionAlong="0.5"/>
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</projection>
<projection id="PT_L5B_PV_L5" presynapticPopulation="PT_L5B" postsynapticPopulation="PV_L5" synapse="GABAA">
<connection id="0" preCellId="../PT_L5B/2/HHCell" postCellId="../PV_L5/9/HHCell" preSegmentId="0" preFractionAlong="0.5" postSegmentId="0" postFractionAlong="0.5"/>
<connection id="1" preCellId="../PT_L5B/47/HHCell" postCellId="../PV_L5/26/HHCell" preSegmentId="0" preFractionAlong="0.5" postSegmentId="0" postFractionAlong="0.5"/>
</projection>
<projection id="CT_L6_IT_L5A" presynapticPopulation="CT_L6" postsynapticPopulation="IT_L5A" synapse="AMPA_syn">
<connection id="0" preCellId="../CT_L6/3/HHCell" postCellId="../IT_L5A/59/HHCell" preSegmentId="0" preFractionAlong="0.5" postSegmentId="0" postFractionAlong="0.5"/>
<connection id="1" preCellId="../CT_L6/19/HHCell" postCellId="../IT_L5A/28/HHCell" preSegmentId="0" preFractionAlong="0.5" postSegmentId="0" postFractionAlong="0.5"/>
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</projection>
<projection id="CT_L6_CT_L6" presynapticPopulation="CT_L6" postsynapticPopulation="CT_L6" synapse="AMPA_syn">
<connection id="0" preCellId="../CT_L6/2/HHCell" postCellId="../CT_L6/37/HHCell" preSegmentId="0" preFractionAlong="0.5" postSegmentId="0" postFractionAlong="0.5"/>
<connection id="1" preCellId="../CT_L6/2/HHCell" postCellId="../CT_L6/27/HHCell" preSegmentId="0" preFractionAlong="0.5" postSegmentId="0" postFractionAlong="0.5"/>
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</projection>
<projection id="SOM_L23_IT_L4" presynapticPopulation="SOM_L23" postsynapticPopulation="IT_L4" synapse="AMPA_syn">
<connection id="0" preCellId="../SOM_L23/0/HHCell" postCellId="../IT_L4/31/HHCell" preSegmentId="0" preFractionAlong="0.5" postSegmentId="0" postFractionAlong="0.5"/>
<connection id="1" preCellId="../SOM_L23/9/HHCell" postCellId="../IT_L4/42/HHCell" preSegmentId="0" preFractionAlong="0.5" postSegmentId="0" postFractionAlong="0.5"/>
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</projection>
<projection id="CT_L6_IT_L4" presynapticPopulation="CT_L6" postsynapticPopulation="IT_L4" synapse="AMPA_syn">
<connection id="0" preCellId="../CT_L6/0/HHCell" postCellId="../IT_L4/36/HHCell" preSegmentId="0" preFractionAlong="0.5" postSegmentId="0" postFractionAlong="0.5"/>
<connection id="1" preCellId="../CT_L6/74/HHCell" postCellId="../IT_L4/3/HHCell" preSegmentId="0" preFractionAlong="0.5" postSegmentId="0" postFractionAlong="0.5"/>
</projection>
<projection id="PT_L5B_IT_L23" presynapticPopulation="PT_L5B" postsynapticPopulation="IT_L23" synapse="AMPA_syn">
<connection id="0" preCellId="../PT_L5B/0/HHCell" postCellId="../IT_L23/81/HHCell" preSegmentId="0" preFractionAlong="0.5" postSegmentId="0" postFractionAlong="0.5"/>
<connection id="1" preCellId="../PT_L5B/0/HHCell" postCellId="../IT_L23/11/HHCell" preSegmentId="0" preFractionAlong="0.5" postSegmentId="0" postFractionAlong="0.5"/>
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</projection>
<projection id="PT_L5B_IT_L4" presynapticPopulation="PT_L5B" postsynapticPopulation="IT_L4" synapse="AMPA_syn">
<connection id="0" preCellId="../PT_L5B/0/HHCell" postCellId="../IT_L4/48/HHCell" preSegmentId="0" preFractionAlong="0.5" postSegmentId="0" postFractionAlong="0.5"/>
<connection id="1" preCellId="../PT_L5B/1/HHCell" postCellId="../IT_L4/12/HHCell" preSegmentId="0" preFractionAlong="0.5" postSegmentId="0" postFractionAlong="0.5"/>
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</projection>
<projection id="IT_L5B_IT_L23" presynapticPopulation="IT_L5B" postsynapticPopulation="IT_L23" synapse="AMPA_syn">
<connection id="0" preCellId="../IT_L5B/2/HHCell" postCellId="../IT_L23/12/HHCell" preSegmentId="0" preFractionAlong="0.5" postSegmentId="0" postFractionAlong="0.5"/>
<connection id="1" preCellId="../IT_L5B/2/HHCell" postCellId="../IT_L23/86/HHCell" preSegmentId="0" preFractionAlong="0.5" postSegmentId="0" postFractionAlong="0.5"/>
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</projection>
<projection id="SOM_L6_CT_L6" presynapticPopulation="SOM_L6" postsynapticPopulation="CT_L6" synapse="AMPA_syn">
<connection id="0" preCellId="../SOM_L6/0/HHCell" postCellId="../CT_L6/71/HHCell" preSegmentId="0" preFractionAlong="0.5" postSegmentId="0" postFractionAlong="0.5"/>
<connection id="1" preCellId="../SOM_L6/1/HHCell" postCellId="../CT_L6/66/HHCell" preSegmentId="0" preFractionAlong="0.5" postSegmentId="0" postFractionAlong="0.5"/>
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</projection>
<projection id="PV_L5_IT_L23" presynapticPopulation="PV_L5" postsynapticPopulation="IT_L23" synapse="AMPA_syn">
<connection id="0" preCellId="../PV_L5/0/HHCell" postCellId="../IT_L23/8/HHCell" preSegmentId="0" preFractionAlong="0.5" postSegmentId="0" postFractionAlong="0.5"/>
<connection id="1" preCellId="../PV_L5/0/HHCell" postCellId="../IT_L23/108/HHCell" preSegmentId="0" preFractionAlong="0.5" postSegmentId="0" postFractionAlong="0.5"/>
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</projection>
<projection id="IT_L5A_PT_L5B" presynapticPopulation="IT_L5A" postsynapticPopulation="PT_L5B" synapse="AMPA_syn">
<connection id="0" preCellId="../IT_L5A/0/HHCell" postCellId="../PT_L5B/67/HHCell" preSegmentId="0" preFractionAlong="0.5" postSegmentId="0" postFractionAlong="0.5"/>
<connection id="1" preCellId="../IT_L5A/0/HHCell" postCellId="../PT_L5B/29/HHCell" preSegmentId="0" preFractionAlong="0.5" postSegmentId="0" postFractionAlong="0.5"/>
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</projection>
<projection id="PT_L5B_SOM_L5" presynapticPopulation="PT_L5B" postsynapticPopulation="SOM_L5" synapse="GABAB">
<connection id="0" preCellId="../PT_L5B/24/HHCell" postCellId="../SOM_L5/34/HHCell" preSegmentId="0" preFractionAlong="0.5" postSegmentId="0" postFractionAlong="0.5"/>
<connection id="1" preCellId="../PT_L5B/47/HHCell" postCellId="../SOM_L5/6/HHCell" preSegmentId="0" preFractionAlong="0.5" postSegmentId="0" postFractionAlong="0.5"/>
</projection>
<projection id="IT_L4_IT_L5B" presynapticPopulation="IT_L4" postsynapticPopulation="IT_L5B" synapse="AMPA_syn">
<connection id="0" preCellId="../IT_L4/0/HHCell" postCellId="../IT_L5B/15/HHCell" preSegmentId="0" preFractionAlong="0.5" postSegmentId="0" postFractionAlong="0.5"/>
<connection id="1" preCellId="../IT_L4/0/HHCell" postCellId="../IT_L5B/73/HHCell" preSegmentId="0" preFractionAlong="0.5" postSegmentId="0" postFractionAlong="0.5"/>
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</projection>
<projection id="PV_L5_IT_L5B" presynapticPopulation="PV_L5" postsynapticPopulation="IT_L5B" synapse="AMPA_syn">
<connection id="0" preCellId="../PV_L5/0/HHCell" postCellId="../IT_L5B/6/HHCell" preSegmentId="0" preFractionAlong="0.5" postSegmentId="0" postFractionAlong="0.5"/>
<connection id="1" preCellId="../PV_L5/0/HHCell" postCellId="../IT_L5B/11/HHCell" preSegmentId="0" preFractionAlong="0.5" postSegmentId="0" postFractionAlong="0.5"/>
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</projection>
<projection id="IT_L5A_PV_L5" presynapticPopulation="IT_L5A" postsynapticPopulation="PV_L5" synapse="GABAA">
<connection id="0" preCellId="../IT_L5A/21/HHCell" postCellId="../PV_L5/6/HHCell" preSegmentId="0" preFractionAlong="0.5" postSegmentId="0" postFractionAlong="0.5"/>
<connection id="1" preCellId="../IT_L5A/46/HHCell" postCellId="../PV_L5/10/HHCell" preSegmentId="0" preFractionAlong="0.5" postSegmentId="0" postFractionAlong="0.5"/>
</projection>
<projection id="IT_L5B_IT_L5B" presynapticPopulation="IT_L5B" postsynapticPopulation="IT_L5B" synapse="AMPA_syn">
<connection id="0" preCellId="../IT_L5B/0/HHCell" postCellId="../IT_L5B/19/HHCell" preSegmentId="0" preFractionAlong="0.5" postSegmentId="0" postFractionAlong="0.5"/>
<connection id="1" preCellId="../IT_L5B/2/HHCell" postCellId="../IT_L5B/31/HHCell" preSegmentId="0" preFractionAlong="0.5" postSegmentId="0" postFractionAlong="0.5"/>
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</projection>
<projection id="PV_L23_IT_L5B" presynapticPopulation="PV_L23" postsynapticPopulation="IT_L5B" synapse="AMPA_syn">
<connection id="0" preCellId="../PV_L23/0/HHCell" postCellId="../IT_L5B/58/HHCell" preSegmentId="0" preFractionAlong="0.5" postSegmentId="0" postFractionAlong="0.5"/>
<connection id="1" preCellId="../PV_L23/2/HHCell" postCellId="../IT_L5B/63/HHCell" preSegmentId="0" preFractionAlong="0.5" postSegmentId="0" postFractionAlong="0.5"/>
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</projection>
<projection id="IT_L4_SOM_L5" presynapticPopulation="IT_L4" postsynapticPopulation="SOM_L5" synapse="GABAB">
<connection id="0" preCellId="../IT_L4/41/HHCell" postCellId="../SOM_L5/29/HHCell" preSegmentId="0" preFractionAlong="0.5" postSegmentId="0" postFractionAlong="0.5"/>
<connection id="1" preCellId="../IT_L4/54/HHCell" postCellId="../SOM_L5/34/HHCell" preSegmentId="0" preFractionAlong="0.5" postSegmentId="0" postFractionAlong="0.5"/>
</projection>
<projection id="IT_L5A_IT_L23" presynapticPopulation="IT_L5A" postsynapticPopulation="IT_L23" synapse="AMPA_syn">
<connection id="0" preCellId="../IT_L5A/0/HHCell" postCellId="../IT_L23/82/HHCell" preSegmentId="0" preFractionAlong="0.5" postSegmentId="0" postFractionAlong="0.5"/>
<connection id="1" preCellId="../IT_L5A/1/HHCell" postCellId="../IT_L23/0/HHCell" preSegmentId="0" preFractionAlong="0.5" postSegmentId="0" postFractionAlong="0.5"/>
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</projection>
<projection id="IT_L23_PV_L23" presynapticPopulation="IT_L23" postsynapticPopulation="PV_L23" synapse="GABAA">
<connection id="0" preCellId="../IT_L23/1/HHCell" postCellId="../PV_L23/7/HHCell" preSegmentId="0" preFractionAlong="0.5" postSegmentId="0" postFractionAlong="0.5"/>
<connection id="1" preCellId="../IT_L23/4/HHCell" postCellId="../PV_L23/16/HHCell" preSegmentId="0" preFractionAlong="0.5" postSegmentId="0" postFractionAlong="0.5"/>
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</projection>
<projection id="SOM_L23_IT_L5B" presynapticPopulation="SOM_L23" postsynapticPopulation="IT_L5B" synapse="AMPA_syn">
<connection id="0" preCellId="../SOM_L23/2/HHCell" postCellId="../IT_L5B/29/HHCell" preSegmentId="0" preFractionAlong="0.5" postSegmentId="0" postFractionAlong="0.5"/>
<connection id="1" preCellId="../SOM_L23/6/HHCell" postCellId="../IT_L5B/76/HHCell" preSegmentId="0" preFractionAlong="0.5" postSegmentId="0" postFractionAlong="0.5"/>
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</projection>
<projection id="IT_L6_IT_L5B" presynapticPopulation="IT_L6" postsynapticPopulation="IT_L5B" synapse="AMPA_syn">
<connection id="0" preCellId="../IT_L6/0/HHCell" postCellId="../IT_L5B/12/HHCell" preSegmentId="0" preFractionAlong="0.5" postSegmentId="0" postFractionAlong="0.5"/>
<connection id="1" preCellId="../IT_L6/0/HHCell" postCellId="../IT_L5B/43/HHCell" preSegmentId="0" preFractionAlong="0.5" postSegmentId="0" postFractionAlong="0.5"/>
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</projection>
<projection id="IT_L23_IT_L5B" presynapticPopulation="IT_L23" postsynapticPopulation="IT_L5B" synapse="AMPA_syn">
<connection id="0" preCellId="../IT_L23/4/HHCell" postCellId="../IT_L5B/21/HHCell" preSegmentId="0" preFractionAlong="0.5" postSegmentId="0" postFractionAlong="0.5"/>
<connection id="1" preCellId="../IT_L23/9/HHCell" postCellId="../IT_L5B/63/HHCell" preSegmentId="0" preFractionAlong="0.5" postSegmentId="0" postFractionAlong="0.5"/>
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</projection>
<projection id="PV_L5_IT_L4" presynapticPopulation="PV_L5" postsynapticPopulation="IT_L4" synapse="AMPA_syn">
<connection id="0" preCellId="../PV_L5/0/HHCell" postCellId="../IT_L4/32/HHCell" preSegmentId="0" preFractionAlong="0.5" postSegmentId="0" postFractionAlong="0.5"/>
<connection id="1" preCellId="../PV_L5/0/HHCell" postCellId="../IT_L4/5/HHCell" preSegmentId="0" preFractionAlong="0.5" postSegmentId="0" postFractionAlong="0.5"/>
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</projection>
<projection id="IT_L4_IT_L4" presynapticPopulation="IT_L4" postsynapticPopulation="IT_L4" synapse="AMPA_syn">
<connection id="0" preCellId="../IT_L4/0/HHCell" postCellId="../IT_L4/49/HHCell" preSegmentId="0" preFractionAlong="0.5" postSegmentId="0" postFractionAlong="0.5"/>
<connection id="1" preCellId="../IT_L4/0/HHCell" postCellId="../IT_L4/58/HHCell" preSegmentId="0" preFractionAlong="0.5" postSegmentId="0" postFractionAlong="0.5"/>
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</projection>
<projection id="IT_L5B_IT_L4" presynapticPopulation="IT_L5B" postsynapticPopulation="IT_L4" synapse="AMPA_syn">
<connection id="0" preCellId="../IT_L5B/2/HHCell" postCellId="../IT_L4/62/HHCell" preSegmentId="0" preFractionAlong="0.5" postSegmentId="0" postFractionAlong="0.5"/>
<connection id="1" preCellId="../IT_L5B/2/HHCell" postCellId="../IT_L4/55/HHCell" preSegmentId="0" preFractionAlong="0.5" postSegmentId="0" postFractionAlong="0.5"/>
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</projection>
<projection id="PV_L23_PT_L5B" presynapticPopulation="PV_L23" postsynapticPopulation="PT_L5B" synapse="AMPA_syn">
<connection id="0" preCellId="../PV_L23/0/HHCell" postCellId="../PT_L5B/26/HHCell" preSegmentId="0" preFractionAlong="0.5" postSegmentId="0" postFractionAlong="0.5"/>
<connection id="1" preCellId="../PV_L23/0/HHCell" postCellId="../PT_L5B/62/HHCell" preSegmentId="0" preFractionAlong="0.5" postSegmentId="0" postFractionAlong="0.5"/>
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</projection>
<projection id="PV_L6_IT_L6" presynapticPopulation="PV_L6" postsynapticPopulation="IT_L6" synapse="AMPA_syn">
<connection id="0" preCellId="../PV_L6/1/HHCell" postCellId="../IT_L6/46/HHCell" preSegmentId="0" preFractionAlong="0.5" postSegmentId="0" postFractionAlong="0.5"/>
<connection id="1" preCellId="../PV_L6/4/HHCell" postCellId="../IT_L6/63/HHCell" preSegmentId="0" preFractionAlong="0.5" postSegmentId="0" postFractionAlong="0.5"/>
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</projection>
<projection id="SOM_L5_IT_L4" presynapticPopulation="SOM_L5" postsynapticPopulation="IT_L4" synapse="AMPA_syn">
<connection id="0" preCellId="../SOM_L5/0/HHCell" postCellId="../IT_L4/50/HHCell" preSegmentId="0" preFractionAlong="0.5" postSegmentId="0" postFractionAlong="0.5"/>
<connection id="1" preCellId="../SOM_L5/1/HHCell" postCellId="../IT_L4/56/HHCell" preSegmentId="0" preFractionAlong="0.5" postSegmentId="0" postFractionAlong="0.5"/>
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</projection>
<projection id="IT_L23_CT_L6" presynapticPopulation="IT_L23" postsynapticPopulation="CT_L6" synapse="AMPA_syn">
<connection id="0" preCellId="../IT_L23/17/HHCell" postCellId="../CT_L6/68/HHCell" preSegmentId="0" preFractionAlong="0.5" postSegmentId="0" postFractionAlong="0.5"/>
</projection>
<projection id="PV_L5_IT_L5A" presynapticPopulation="PV_L5" postsynapticPopulation="IT_L5A" synapse="AMPA_syn">
<connection id="0" preCellId="../PV_L5/0/HHCell" postCellId="../IT_L5A/37/HHCell" preSegmentId="0" preFractionAlong="0.5" postSegmentId="0" postFractionAlong="0.5"/>
<connection id="1" preCellId="../PV_L5/0/HHCell" postCellId="../IT_L5A/21/HHCell" preSegmentId="0" preFractionAlong="0.5" postSegmentId="0" postFractionAlong="0.5"/>
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</projection>
<projection id="PV_L5_PT_L5B" presynapticPopulation="PV_L5" postsynapticPopulation="PT_L5B" synapse="AMPA_syn">
<connection id="0" preCellId="../PV_L5/0/HHCell" postCellId="../PT_L5B/37/HHCell" preSegmentId="0" preFractionAlong="0.5" postSegmentId="0" postFractionAlong="0.5"/>
<connection id="1" preCellId="../PV_L5/0/HHCell" postCellId="../PT_L5B/58/HHCell" preSegmentId="0" preFractionAlong="0.5" postSegmentId="0" postFractionAlong="0.5"/>
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</projection>
<projection id="SOM_L5_IT_L23" presynapticPopulation="SOM_L5" postsynapticPopulation="IT_L23" synapse="AMPA_syn">
<connection id="0" preCellId="../SOM_L5/0/HHCell" postCellId="../IT_L23/17/HHCell" preSegmentId="0" preFractionAlong="0.5" postSegmentId="0" postFractionAlong="0.5"/>
<connection id="1" preCellId="../SOM_L5/0/HHCell" postCellId="../IT_L23/80/HHCell" preSegmentId="0" preFractionAlong="0.5" postSegmentId="0" postFractionAlong="0.5"/>
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</projection>
<projection id="IT_L23_IT_L4" presynapticPopulation="IT_L23" postsynapticPopulation="IT_L4" synapse="AMPA_syn">
<connection id="0" preCellId="../IT_L23/0/HHCell" postCellId="../IT_L4/2/HHCell" preSegmentId="0" preFractionAlong="0.5" postSegmentId="0" postFractionAlong="0.5"/>
<connection id="1" preCellId="../IT_L23/1/HHCell" postCellId="../IT_L4/51/HHCell" preSegmentId="0" preFractionAlong="0.5" postSegmentId="0" postFractionAlong="0.5"/>
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</projection>
<projection id="SOM_L6_IT_L6" presynapticPopulation="SOM_L6" postsynapticPopulation="IT_L6" synapse="AMPA_syn">
<connection id="0" preCellId="../SOM_L6/3/HHCell" postCellId="../IT_L6/10/HHCell" preSegmentId="0" preFractionAlong="0.5" postSegmentId="0" postFractionAlong="0.5"/>
<connection id="1" preCellId="../SOM_L6/3/HHCell" postCellId="../IT_L6/32/HHCell" preSegmentId="0" preFractionAlong="0.5" postSegmentId="0" postFractionAlong="0.5"/>
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</projection>
<projection id="IT_L5B_SOM_L5" presynapticPopulation="IT_L5B" postsynapticPopulation="SOM_L5" synapse="GABAB">
<connection id="0" preCellId="../IT_L5B/5/HHCell" postCellId="../SOM_L5/34/HHCell" preSegmentId="0" preFractionAlong="0.5" postSegmentId="0" postFractionAlong="0.5"/>
</projection>
<projection id="IT_L5B_IT_L5A" presynapticPopulation="IT_L5B" postsynapticPopulation="IT_L5A" synapse="AMPA_syn">
<connection id="0" preCellId="../IT_L5B/1/HHCell" postCellId="../IT_L5A/19/HHCell" preSegmentId="0" preFractionAlong="0.5" postSegmentId="0" postFractionAlong="0.5"/>
<connection id="1" preCellId="../IT_L5B/2/HHCell" postCellId="../IT_L5A/69/HHCell" preSegmentId="0" preFractionAlong="0.5" postSegmentId="0" postFractionAlong="0.5"/>
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</projection>
<projection id="SOM_L5_SOM_L5" presynapticPopulation="SOM_L5" postsynapticPopulation="SOM_L5" synapse="GABAB">
<connection id="0" preCellId="../SOM_L5/12/HHCell" postCellId="../SOM_L5/36/HHCell" preSegmentId="0" preFractionAlong="0.5" postSegmentId="0" postFractionAlong="0.5"/>
</projection>
<projection id="SOM_L6_PT_L5B" presynapticPopulation="SOM_L6" postsynapticPopulation="PT_L5B" synapse="AMPA_syn">
<connection id="0" preCellId="../SOM_L6/7/HHCell" postCellId="../PT_L5B/5/HHCell" preSegmentId="0" preFractionAlong="0.5" postSegmentId="0" postFractionAlong="0.5"/>
<connection id="1" preCellId="../SOM_L6/7/HHCell" postCellId="../PT_L5B/4/HHCell" preSegmentId="0" preFractionAlong="0.5" postSegmentId="0" postFractionAlong="0.5"/>
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</projection>
</network>
</neuroml>
